# Detailing Requirements (Beams - Torsion) - ACI 318-05
Bar_NoPrefered := 4
As_provided := 0.82 in^2
Bar_No := transpose([3, 4, 5, 6, 7, 8, 10, 14, 18])
As_bar := (π/4*transpose([(3/8)^2, (4/8)^2, (5/8)^2, (6/8)^2, (7/8)^2, (8/8)^2, (10/8)^2, (14/8)^2, (18/8)^2])) in^2
A_bar := Lookup(Bar_NoPrefered, Bar_No, As_bar, "eq") = [0.19635] in^2
No_bars := round(ceil(As_provided/A_bar)/2)*2
No_bars = [6]
