# Detailing Requirements (Beams) - ACI 318-05
fc' := 3 ksi
fy := 60 ksi
b_w := 12 in
d := 21.75 in
As_etab := 0.4 in^2
Bar_NoPrefered := 4
β_1 :=
    if fc' ≤ 4 ksi
        0.85
    else
        max(0.85 - 0.05*(fc'/ksi - 4), 0.65)
As_min := min(3*((fc'/psi)^0.5*psi/fy)*(b_w*d), 200/(fy/psi)*(b_w*d))
As_min = 0.714778 in^2
As_max := 0.85*β_1*(fc'/fy)*(0.003/(0.003 + 0.004))*(b_w*d)
As_max = 4.04084 in^2
As_check :=
    if As_etab < As_min
        "Fail - Below Minimum"
    else if As_etab > As_min
        "Fail - Above Maximum (Over Reinforced)"
    else
        "Ok"
As_provided :=
    if As_etab < As_min
        As_min
    else if As_etab > As_max
        As_max
    else
        As_etab
As_provided = 0.714778 in^2
Bar_No := transpose([3, 4, 5, 6, 7, 8, 10, 14, 18])
As_bar := (π/4*transpose([(3/8)^2, (4/8)^2, (5/8)^2, (6/8)^2, (7/8)^2, (8/8)^2, (10/8)^2, (14/8)^2, (18/8)^2])) in^2
A_bar := Lookup(Bar_NoPrefered, Bar_No, As_bar, "eq") = [0.19635] in^2
No_bars := ceil(As_provided/A_bar) = [4]
