# Subgrade Modulus:
q_a := 2.5 tonf/ft^2  # From Geotechnical Investigation Report
FOS := 3  # From Geotechnical Investigation Report
# q_a= q_ult / FOS => q_ult= q_a x FOS
#
# k_s = q_ult / Δ_h
k_s := q_a*FOS/(1 in)
k_s = 0.104167*(kip/in)/in^2  # Z (Third Axis in SAFE)
